Black Cat 004 full aircraft
#Mach
0.000000
#IYsym  IZsym  Zsym
0  0  0.000000
#Sref  Cref  Bref
30.690000000  1.005842294  33.000000000
#Xref  Yref  Zref
0.251460573  0.000000000  0.000000000
#CDp
0.000000
#
SURFACE
Wing
12  1.0  30  -2.0
COMPONENT
1
YDUPLICATE
0.0
#
SECTION
0.000000000  0.000000000  0.000000000  1.390000000  0.000000000
NACA
2412
#
SECTION
0.000000000  1.500000000  0.000000000  1.270000000  0.000000000
NACA
2412
#
SECTION
0.000000000  4.500000000  0.120000000  1.050000000  0.000000000
NACA
2412
#
SECTION
0.000000000  7.500000000  0.380000000  0.820000000  0.000000000
NACA
2412
#
SECTION
0.000000000  10.500000000  0.770000000  0.680000000  0.000000000
NACA
2412
#
SECTION
0.000000000  13.500000000  1.310000000  0.550000000  0.000000000
NACA
2412
#
SECTION
0.000000000  16.500000000  1.730000000  0.470000000  0.000000000
NACA
2412
#
SURFACE
Elevator
8  1.0  12  -2.0
COMPONENT
2
YDUPLICATE
0.0
#
SECTION
4.000000000  0.000000000  0.000000000  0.800000000  0.000000000
NACA
0009
CONTROL
elevator  1.0  0.000000000  0.0  0.0  0.0  1.0
#
SECTION
4.000000000  1.500000000  0.000000000  0.800000000  0.000000000
NACA
0009
CONTROL
elevator  1.0  0.000000000  0.0  0.0  0.0  1.0
#
SURFACE
Fin
8  1.0  12  -2.0
COMPONENT
3
#
SECTION
5.000000000  0.000000000  -0.700000000  0.700000000  0.000000000
NACA
0009
CONTROL
rudder  1.0  0.000000000  0.0  0.0  1.0  1.0
#
SECTION
5.000000000  0.000000000  1.700000000  0.700000000  0.000000000
NACA
0009
CONTROL
rudder  1.0  0.000000000  0.0  0.0  1.0  1.0
